<?xml version="1.0" encoding="UTF-8"?>
<?xml-stylesheet type="text/xsl" href="http://jsbsim.sourceforge.net/JSBSimScript.xsl"?>
<runscript xmlns:xsi="http://www.w3.org/2001/XMLSchema-instance"
    xsi:noNamespaceSchemaLocation="http://jsbsim.sf.net/JSBSimScript.xsd"
    name="C172 cruise at 4K, 100% power">
  <description>This run is for testing the C172 altitude hold autopilot and cruise performance</description>
  <use aircraft="c172gtri" initialize="reset01"/>

  <run start="0.0" end="3000" dt="0.0083333">

    <event name="Set Altitude: 40000">
      <condition>
        simulation/sim-time-sec  ge  0.0
      </condition>
      <set name="ap/altitude_setpoint" value="4000.0"/>
    </event>

    <event name="Start engine">
      <condition>
        simulation/sim-time-sec  ge  0.01
      </condition>
      <set name="fcs/throttle-cmd-norm" action="FG_RAMP" value="0.50" tc="0.05"/>
      <set name="fcs/mixture-cmd-norm" action="FG_RAMP" value="1.0" tc="0.05"/>
      <set name="propulsion/magneto_cmd" value="3"/>
      <set name="propulsion/starter_cmd" value="1"/>
      <notify/>
    </event>

    <event name="Trim">
      <condition>
        simulation/sim-time-sec  gt  1.0
      </condition>
      <set name="simulation/do_simple_trim" value="1"/>
      <notify>
        <property> velocities/u-aero-fps </property>
        <property> velocities/v-aero-fps </property>
        <property> velocities/w-aero-fps </property>
        <property> attitude/psi-rad </property>
        <property> attitude/theta-rad </property>
        <property> attitude/phi-rad </property>
        <property> position/h-agl-ft </property>
        <property> accelerations/pdot-rad_sec2 </property>
        <property> accelerations/qdot-rad_sec2 </property>
        <property> accelerations/rdot-rad_sec2 </property>
        <property> propulsion/engine/thrust-lbs </property>
        <property> propulsion/engine/propeller-rpm </property>
        <property> velocities/p-rad_sec </property>
        <property> velocities/q-rad_sec </property>
        <property> velocities/r-rad_sec </property>
        <property> fcs/elevator-cmd-norm </property>
        <property> fcs/aileron-cmd-norm </property>
        <property> fcs/rudder-cmd-norm </property>
        <property> fcs/elevator-pos-norm </property>
        <property> fcs/right-aileron-pos-norm </property>
        <property> fcs/rudder-pos-norm </property>
        <property> fcs/throttle-pos-norm[0] </property>
        <property> fcs/mixture-pos-norm[0] </property>
        <property> inertia/weight-lbs </property>
        <property> velocities/vc-kts </property>
        <property> velocities/ve-kts </property>
        <property> velocities/vtrue-kts </property>
        <property> atmosphere/T-R </property>
        <property> propulsion/engine/fuel-flow-rate-gph </property>
        <property> propulsion/engine/power-hp </property>
      </notify>
    </event>

    <event name="1 - Hold heading and altitude">
      <condition>simulation/sim-time-sec ge 5</condition>
      <set name="guidance/specified-heading-rad" value="0"/>
      <set name="guidance/heading-selector-switch" value="1"/>
      <set name="ap/autopilot-roll-on" value="1"/>
      <set name="ap/roll-attitude-mode" value="1"/>
      <set name="ap/altitude_setpoint" value="4000.0"/>
      <set name="ap/altitude_hold" value="1"/>
      <notify/>
    </event>

    <event name="2 - Hold heading and altitude">
      <condition>simulation/sim-time-sec ge 40</condition>
      <set name="guidance/specified-heading-rad" value="1.570796327"/>
      <notify/>
    </event>

    <event name="3 - Hold heading and altitude">
      <condition>simulation/sim-time-sec ge 80</condition>
      <set name="guidance/specified-heading-rad" value="3.14159265359"/>
      <notify/>
    </event>

    <event name="4 - Hold heading and altitude">
      <condition>simulation/sim-time-sec ge 160</condition>
      <set name="guidance/specified-heading-rad" value="-1.570796327"/>
      <notify/>
    </event>

    <event name="5 - Hold heading and altitude">
      <condition>simulation/sim-time-sec ge 240</condition>
      <set name="guidance/specified-heading-rad" value="0"/>
      <notify/>
    </event>

  </run>
</runscript>
